# APROKSYMACJA
# 1. Poniżej podano węzły aproksymacji. Wyznacz wielomian aproksymujący optymalnego stopnia metodą aproksymacji wielomianowej (jednomianami). Optymalny stopień określ  porównując błędy dla poszczególnych stopni. Sporządź wykres funkcji aproksymującej w przedziale pokrytym przez węzły oraz nanieś na wykres węzły aproksymacji.
w := [0; 1; 2; 3; 4; 5; 6; 7; 8; 9]
y := [-5.975; -2.634; 2.7; -6.494; -3.543; -25.017; -24.79; -45.42; -64.172; -79.554]
# 2. Na podstawie podanej poniżej funkcji wygeneruj odpowiednie węzły (z zaburzeniem) i wyznacz wielomian aproksymujący optymalnego stopnia metodą aproksymacji trygonometrycznej.  Optymalny stopień określ porównując błędy dla poszczególnych stopni. Sporządź wykres funkcji aproksymującej w przedziale pokrytym przez węzły oraz nanieś na wykres węzły aproksymacji.
f(x) := sin(x) + sin(2*x + π/4)
N := 8
# 3. Dla węzłów podanych w punkcie 1. wyznacz wielomian aproksymujący optymalnego stopnia metodą aproksymacji wielomianami ortogonalnymi. Optymalny stopień określ  porównując błędy dla poszczególnych stopni. Sporządź wykres funkcji aproksymującej w przedziale pokrytym przez węzły oraz nanieś na wykres węzły aproksymacji.
# Porównaj obie metody (aproksymacji jednomianami i wielomianami ortogonalnymi).
# =====================================================================
Aproksymacja_Wielomianowa(xx, X, Y, stopien) :=
    for i ∈ 0 .. stopien
        b[i] ← sum(X[k]^i*Y[k], k = 0 .. length(X) - 1)
        for j ∈ 0 .. stopien
            G[i, j] ← sum(X[k]^(i + j), k = 0 .. length(X) - 1)
    a ← G^-1*b
    return sum(a[j]*xx^j, j = 0 .. stopien)
Blad_Sredniokwadratowy(X, Y, stopien) := sqrt(sum((Y[k] - Aproksymacja_Wielomianowa(X[k], X, Y, stopien))^2, k = 0 .. length(X) - 1))
Pokaz_Bledy(X, Y) :=
    for i ∈ 0 .. 5
        V[i, 0] ← Blad_Sredniokwadratowy(X, Y, i + 1)
        V[i, 1] ← "blad sredniokwadratowy dla  interpolacji "
        V[i, 2] ← i
        V[i, 3] ← "stopnia"
    V
Pokaz_Bledy(w, y) = [
    36.5176, "blad sredniokwadratowy dla  interpolacji ", 0, "stopnia";
    12.0702, "blad sredniokwadratowy dla  interpolacji ", 1, "stopnia";
    11.6848, "blad sredniokwadratowy dla  interpolacji ", 2, "stopnia";
    11.6495, "blad sredniokwadratowy dla  interpolacji ", 3, "stopnia";
    11.5528, "blad sredniokwadratowy dla  interpolacji ", 4, "stopnia";
    10.9856, "blad sredniokwadratowy dla  interpolacji ", 5, "stopnia"
]
zmienna := 0, 0.01 .. 9
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# =====================================================================
f(x) := sin(x) + sin(2*x + π/4)
N := 8
x :=
    for i ∈ 0 .. N - 1
        x[i] ← π*i/(1/2*N)
    x
x = [0; 0.785398; 1.5708; 2.35619; 3.14159; 3.92699; 4.71239; 5.49779]
y_correct := f(x) = [0.707107; 1.41421; 0.292893; 0; 0.707107; 0; -1.70711; -1.41421]
y(f, x) :=
    for i ∈ 0 .. N - 1
        y[i] ← f(x[i]) + rnd(1) - 0.5
    return y
y_apr := y(f, x) = [0.208375; 1.10754; 0.377899; -0.149692; 1.02994; -0.325871; -1.49661; -1.61023]
zmienna1 := 0, 0.01 .. 5.485
aproksymacja_tryg(xx, X, Y, stopien_aproksymacji, N) :=
    for j ∈ 0 .. stopien_aproksymacji
        a_vector[j] ← 2/N*sum(Y[k]*cos(j*X[k]), k = 0 .. N - 1)
    for j ∈ 0 .. stopien_aproksymacji
        b_vector[j] ← 2/N*sum(Y[k]*sin(j*X[k]), k = 0 .. N - 1)
    a_vector[0]/2 + sum(a_vector[j]*cos(j*xx) + b_vector[j]*sin(j*xx), j = 1 .. stopien_aproksymacji)
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Blad_Sredniokwadratowy_Tryg(X, Y, stopien, N) := sqrt(sum((Y[k] - aproksymacja_tryg(X[k], X, Y, stopien, N))^2, k = 0 .. length(X) - 1))
Pokaz_Bledy_tryg(X, Y, N) :=
    for i ∈ 0 .. 5
        V[i, 0] ← Blad_Sredniokwadratowy_Tryg(X, Y, i + 1, N)
        V[i, 1] ← "blad sredniokwadratowy dla  interpolacji "
        V[i, 2] ← i
        V[i, 3] ← "stopnia"
    V
Pokaz_Bledy_tryg(x, y_apr, 8) = [
    1.82286, "blad sredniokwadratowy dla  interpolacji ", 0, "stopnia";
    0.5648, "blad sredniokwadratowy dla  interpolacji ", 1, "stopnia";
    0.388153, "blad sredniokwadratowy dla  interpolacji ", 2, "stopnia";
    0.388153, "blad sredniokwadratowy dla  interpolacji ", 3, "stopnia";
    0.5648, "blad sredniokwadratowy dla  interpolacji ", 4, "stopnia";
    1.82286, "blad sredniokwadratowy dla  interpolacji ", 5, "stopnia"
]
# ====================================================================
# Wielomiany ortogonalne
w := [0; 1; 2; 3; 4; 5; 6; 7; 8; 9]
y := [-5.975; -2.634; 2.7; -6.494; -3.543; -25.017; -24.79; -45.42; -64.172; -79.554]
N := 10
h := 1
i := 0 .. N - 1
x[i] := i*h
st := 0 .. 2
zmienna := 0, 0.01 .. 9
iloczyn(arg, j) :=
    return 1 if j == 0
    return product(arg - l, l = 0 .. j - 1) otherwise
P(k, q) := sum((-1)^j*(k!/((k - j)!*j!))*((k + j)!/(k!*j!))*iloczyn(q, j)/iloczyn(N - 1, j), j = 0 .. k)
a[st] := sum(y[j]*P(st, y[j]), j = 0 .. N - 1)/sum(P(st, y[j])^2, j = 0 .. N - 1)
a = [-25.4899; -4.1286; -0.153816]
F_Gram(arg) := sum(a[j]*P(j, arg), j = 0 .. 2)
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