# Zad 1
b := 1.123456789*10^15
P := b - 1/(1/b + 0.1) = 1.12346e15
P2 := b + 0.1 - 1/(1/b) = 0
# Przyczyną jest  błąd zaokrągleń
# Zad 2
p := 1 .. 15
π = 3.14159
G[p] := 1/p*(10^p*(1 + p*π*10^(-p)) - 10^p)
# Bład danych wejsciowych bo zaokraglamy liczbe pi
G = [0; 3.14159; 3.14159; 3.14159; 3.14159; 3.14159; 3.14159; 3.14159; 3.14159; 3.14159; 3.14159; 3.14159; 3.1416; 3.14153; 3.14174; 3.14167]
# zadanie 3
V[0] := 1
V[1] := (V[0] + 0.3)
V[2] := (1/2*0.3^2 + V[1])
V[3] := (1/6*0.3^3 + V[2])
V[4] := (1/24*0.3^4 + V[3])
V[5] := (1/120*0.3^5 + V[3])
V = [1; 1.3; 1.345; 1.3495; 1.34984; 1.34952]
a := e^0.3 = 1.34986
p := 0 .. 5
Δ[p] := |V[p] - a|
δ[p] := Δ[p]/|a|
δ = [0.259182; 0.0369363; 0.00359949; 0.000265811; 1.5785e-5; 0.00025081]
Δ = [0.349859; 0.0498588; 0.00485881; 0.000358808; 2.13076e-5; 0.000338558]
# Błąd obcięcia
# zadanie 5
x := -2, -1.99 .. 2
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# Obliczanie wartości tangensa kąta bliskiego Pi/2 jest źle uwarunkowane
# ponieważ niewielkie zmiany wartośći kąta powodują duże zmiany wartośći otrzymanego wyniku
# Zadanie 4
max_number(mbits, cbits) :=
    max_mantysa ← 0
    for i ∈ 1 .. mbits
        max_mantysa ← max_mantysa + 2^(-i)
    max_cecha ← 0
    for j ∈ 0 .. cbits - 1
        max_cecha ← max_cecha + 2^j
    return max_mantysa*2^max_cecha
max_number(4, 2) = 7.5
min_number(cbits) :=
    max_cecha ← 0
    for j ∈ 0 .. cbits - 1
        max_cecha ← max_cecha + 2^j
    min_mantysa ← 1/2
    return 1/2*2^(-max_cecha)
min_number(2) = 0.0625
# x E <-7.5,-0.0625> v {0} v <0.0625,7.5>
e1 := 0.0625 - 0.001 = 0.0615
e2 := 8 - 7.5 = 0.5
# 01000110=
x := 3/4*2^-2 = 0.1875
Δ := |x - 0.2| = 0.0125
δ := Δ/|0.2| = 0.0625
min_number(2) = 0.0625
# e)
mbits := 1, 2 .. 8
mbits = [1; 2; 3; 4; 5; 6; 7; 8]
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