# Poszukiwanie miejsc zerowych
# Znajdź miejsca zerowe funkcji f(x)=e^(-2x)-1+x^2 z dokładnością 10^-6 za pomocą metod:
# - bisekcji
# - stycznych
# - siecznych
#
# 1. Wykonaj wykres funkcji oraz jej pierwszej i drugiej pochodnej na jednym rysunku
# (pamiętaj o odpowiednim sformatowaniu wykresu!).
#
# 2. Dla każdej metody:
#
# a) wypisz warunki wystarczające zbieżności funkcji w przedziale izolacji pierwiastka
#
# b) dobierz odpowiednie przedziały izolacji tak, aby zagwarantować zbieżność metody
# i wykaż, że funkcja spełnia warunki wystarczające w tych wybranych przedziałach
#
# c) zaimplementuj algorytm metody z uwzględnieniem licznika iteracji
#
# d) wyznacz miejsca zerowe i sprawdź czy uzyskany wynik jest przybliżeniem pierwiastka
# z zadaną dokładnością
#
# e) podaj odpowiedź
#
# 3. Porównaj efektywność wszystkich metod w tym przypadku (na podstawie ilości
# wykonanych iteracji).
ε := 10^-6
f(x) := e^(-2*x) - 1 + x^2
f1(x) := 2*x - 2*e^(-2*x)
f2(x) := 4*e^(-2*x) + 2
xx := -2, -1.99 .. 2
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# Metoda Bisekcji
# Warunki Zbieznosci:
# 1) Funkcja f(x) jest ciągła w przedziale izolacji
# 2) na krańcach przedziału [a;b] wartość funkcji f(x) przyjmuja przyznaki przeciwne <=> f(a)*f(b)<0
# Przedziały izolacji:
#
# [-0.5 ; 0.25] oraz drugi przedzial [0.5 ; 1]
f(-0.5)*f(0.25) = -0.651441  # jest mniejsze od zera warunek spełniony
f(0.5)*f(1) = -0.0517144  # jest mniejsze od zera warunek spełniony
# Funkcja f(x) jest ciągła w każdym z przedziałów jako złożenie funkcji
# wykladniczej oraz wielomianu, które są ciagłe
bisekcja(f, a, b, tol) :=
    i ← 0
    while 1
        c ← (a + b)/2
        if |f(c)| < tol
            {
                break
            }
        b ← c if f(a)*f(c) < 0
        a ← c otherwise
        i ← i + 1
    transpose([c, i])
bisekcja(f, -0.5, 0.25, 10^-6) = [-4.76837e-7; 18]
bisekcja(f, 0.5, 1, 10^-6) = [0.916563; 17]
# x1
f(-0.000000476837) = 9.53675e-7
# x2
f(0.916563034058) = 6.82426e-7
# f(x1) < ε oraz f(x2) < ε
# Metoda stycznych
# Warunki:
# 1) f(a)*f(b)<0
# 2)f(x) funkcja ciągła
# 3) f'(x) oraz f''(x) istnieją i są ciągłe
# 4)f'(x) oraz f''(x) są stałego znaku na przedziale
# 5) odpowiedni punkt startowy
# Przedziały izolacji:
#
# [-0.5 ; 0.25] oraz drugi przedzial [0.5 ; 1]
f(-0.5)*f(0.25) = -0.651441  # jest mniejsze od zera warunek spełniony
f(0.5)*f(1) = -0.0517144  # jest mniejsze od zera warunek spełniony
# Funkcja f(x) jest ciągła w każdym z przedziałów jako złożenie funkcji
# wykladniczej oraz wielomianu, które są ciagłe
# f' oraz f'' są ciągłe ponieważ są złożeniem funkcji wykładniczej oraz wielomianów
# f'' > 0 dla x z dziedziny
# f'- funkcja rosnąca w całej dziedzinie bo f''>0
# f' jest ciagła f'(-0.5)<0 oraz f'(0.25)<0 więc jest stałego znaku " - " w tym przedziale
# f' ( 0.5)>0 i rosnąca jest stałego znaku "+" w przedziale
styczne(f, a, b, tol) :=
    return "ERROR" if f(a)*f(b) > 0
    iteration ← 0
    x ← a if f(a)*d^2/da^2(f(a)) > 0
    x ← b otherwise
    while |f(x)| > tol
        iteration ← iteration + 1
        x ← x - f(x)/(d/dx(f(x)))
    X[0] ← x
    X[1] ← iteration
    return X
styczne(f, -0.5, 0.25, 10^-6) = [-9.19161e-11; 5]
styczne(f, 0.5, 1, 10^-6) = [0.916563; 3]
# x1
f(0.0000000001) = -2e-10
# x2
f(0.91656258357) = 7.02628e-10
# |f(x1)| < ε  oraz f(x2)<ε
# Metoda siecznych
# Warunki:
# 1) f(a)*f(b)<0
# 2)f(x) funkcja ciągła
# 3) f'(x) oraz f''(x) istnieją i są ciągłe
# 4)f'(x) oraz f''(x) są stałego znaku na przedziale
# Przedziały izolacji:
#
# [-0.5 ; 0.25] oraz drugi przedzial [0.5 ; 1]
f(-0.5)*f(0.25) = -0.651441  # jest mniejsze od zera warunek spełniony
f(0.5)*f(1) = -0.0517144  # jest mniejsze od zera warunek spełniony
# Funkcja f(x) jest ciągła w każdym z przedziałów jako złożenie funkcji
# wykladniczej oraz wielomianu, które są ciagłe
# f' oraz f'' są ciągłe ponieważ są złożeniem funkcji wykładniczej oraz wielomianów
# f'' > 0 dla x z dziedziny
# f'- funkcja rosnąca w całej dziedzinie bo f''>0
# f' jest ciagła f'(-0.5)<0 oraz f'(0.25)<0 więc jest stałego znaku " - " w tym przedziale
# f' ( 0.5)>0 i rosnąca jest stałego znaku "+" w przedziale
sieczne(f, a, b, ε) :=
    return "ERROR" if f(a)*f(b) > 0
    k ← 1
    if f(a)*d^2/da^2(f(a)) > 0
        x[k + 1] ← a
        x[k] ← b
    if f(b)*d^2/db^2(f(b)) > 0
        x[k + 1] ← b
        x[k] ← a
    k ← k + 1
    while |f(x[k])| > ε
        x[k + 1] ← x[k] - f(x[k])/(f(x[k - 1]) - f(x[k]))*(x[k - 1] - x[k])
        k ← k + 1
    V[0] ← x[k]
    V[1] ← k - 1
    return V
sieczne(f, -0.5, 0.25, 10^-6) = [-2.99962e-7; 7]
# x1
f(0.0000003) = -6e-7
# x2
f(0.916562162) = -6.37259e-7
sieczne(f, 0.5, 1, 10^-6) = [0.916562; 5]
# f(x1) oraz f(x2) < ε
# Porównanie efektywność
# Najmniej iteracji do znalezienia pierwiastka potrzebowała metoda stycznych
