# Interpolacja wielomianowa
# Dany jest przedział [-2; 2] oraz zadane na nim siedem węzłów równoodległych x_r oraz siedem węzłów Czebyszewa x_c. Dana jest również funkcja:
#
# określona na tym przedziale.
#
# Wyznacz funkcję interpolującą przechodzącą odpowiednio przez punkty (x_r ; f(x_r))
# i (x_c ; f(x_c)) za pomocą metod:
# - Lagrange'a,
# - Newtona.
#
# 1. Dla metody Lagrange'a:
#
# a) zaimplementuj algorytm metody,
#
# b) wykonaj wykresy danej funkcji, funkcji interpolujących przechodzących przez
# zadane węzły oraz węzły interpolacji.
#
# 2. Dla metody Newtona:
#
# a) wyznacz macierz ilorazów różnicowych,
#
# b) zaimplementuj algorytm metody,
#
# c) wykonaj wykresy danej funkcji, funkcji interpolujących przechodzących przez
# zadane węzły oraz węzły interpolacji.
#
# 3. Porównaj wyniki interpolacji Newtona i Lagrange'a.
f(x) := 1/(25*x^2 + 1)
wezly_rownoodlegle(a, b, N) :=
    srednia_odleglosc ← |a - b|/(N - 1)
    for i ∈ 0, 1 .. N - 1
        V[i] ← a + i*srednia_odleglosc
    return V
wezly_Czebyszewa(a, b, N) :=
    for i ∈ 0, 1 .. N - 1
        V[i] ← 1/2*((b - a)*cos((2*i + 1)/N*π/2) + (b + a))
    sort(V)
    return V
xczeb := wezly_Czebyszewa(-2, 2, 7) = [1.94986; 1.56366; 0.867767; 0; -0.867767; -1.56366; -1.94986]
f(x) := 1/(25*x^2 + 1)
xrow := wezly_rownoodlegle(-2, 2, 7) = [-2; -1.33333; -0.666667; 0; 0.666667; 1.33333; 2]
yrow := f(xrow) = [0.00990099; 0.0220049; 0.0825688; 1; 0.0825688; 0.0220049; 0.00990099]
yczeb := f(xczeb) = [0.0104114; 0.0160963; 0.0504401; 1; 0.0504401; 0.0160963; 0.0104114]
Lrow(xx, P) := sum(yrow[i]*product(if(i ≠ j, (xx - P[j])/(P[i] - P[j]), 1), j = 0 .. 6), i = 0 .. 6)
Lczeb(xx, P) := sum(yczeb[i]*product(if(i ≠ j, (xx - P[j])/(P[i] - P[j]), 1), j = 0 .. 6), i = 0 .. 6)
zmienna := -2, -1.95 .. 2
a := 1
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ilorazroznicowy(x, y) :=
    for i ∈ 0 .. (length(x) - 1)
        A[0, i] ← y[i]
    for i ∈ 1 .. (length(x) - 1)
        for j ∈ 0 .. (length(x) - 1 - i)
            A[i, j] ← (A[i - 1, j + 1] - A[i - 1, j])/(x[j + i] - x[j])
    A
macierzrow := ilorazroznicowy(xrow, yrow)
macierzrow = [
    0.00990099, 0.0220049, 0.0825688, 1, 0.0825688, 0.0220049, 0.00990099;
    0.0181558, 0.0908459, 1.37615, -1.37615, -0.0908459, -0.0181558, 0;
    0.0545175, 0.963976, -2.06422, 0.963976, 0.0545175, 0, 0;
    0.454729, -1.5141, 1.5141, -0.454729, 0, 0, 0;
    -0.73831, 1.13557, -0.73831, 0, 0, 0, 0;
    0.562165, -0.562165, 0, 0, 0, 0, 0;
    -0.281083, 0, 0, 0, 0, 0, 0
]
macierzczeb := ilorazroznicowy(xczeb, yczeb)
macierzczeb = [
    0.0104114, 0.0160963, 0.0504401, 1, 0.0504401, 0.0160963, 0.0104114;
    -0.0147204, -0.0493519, -1.09426, 1.09426, 0.0493519, 0.0147204, 0;
    0.0320044, 0.668241, -1.261, 0.668241, 0.0320044, 0, 0;
    -0.3263, 0.79346, -0.79346, 0.3263, 0, 0, 0;
    -0.397413, 0.507437, -0.397413, 0, 0, 0, 0;
    -0.257534, 0.257534, 0, 0, 0, 0, 0;
    -0.132078, 0, 0, 0, 0, 0, 0
]
Newton(M, range, s) := M[0, 0] + sum(M[n, 0]*product(range - s[m], m = 0 .. n - 1), n = 1 .. length(s) - 1)
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DifferenceNew(x, X, M) := |Newton(M, x, X) - f(x)|
DifferenceLag(x, X) := |Lrow(x, X) - f(x)|
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