# Interpolacja funkcjami sklejanymi
# Dla funkcji z poprzednich zajęć: f(x) = 1/(25x^2+1) wykonaj interpolację funkcjami
# sklejanymi 1-go i 3-go stopnia na 7 węzłach równoodległych na przedziale [-2, 2].
# Na wykresie umieść funkcję f(x) i obie funkcje interpolujące. Oceń, która z funkcji jest
# bardziej dokładna (mniejszy błąd interpolacji).
f(x) := 1/(25*x^2 + 1)
wezlyrownooldegle(x1, x2, n) :=
    for i ∈ 0 .. n - 1
        X[i] ← x1 + (x2 - x1)/(n - 1)*i
    X
X := wezlyrownooldegle(-2, 2, 7) = [-2; -1.33333; -0.666667; 0; 0.666667; 1.33333; 2]
Y := f(X) = [0.00990099; 0.0220049; 0.0825688; 1; 0.0825688; 0.0220049; 0.00990099]
s(k, xx) := if(xx ≤ X[k + 1] and xx ≥ X[k], Y[k] + (Y[k + 1] - Y[k])/(X[k + 1] - X[k])*(xx - X[k]), 0)
int(x) := sum(s(n, x), n = 0 .. 5)
x := -2, -1.99 .. 2
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