# Całkowanie
# Dana jest funkcja f(x) := e^(-x^2) . Oblicz całkę na przedziale [0; 1] metodą:
#
# a) prostokąta (punktu środkowego)
# b) trapezu,
# c) wzorem Simpsona
# d) złożonymi metodami a)-c) dla 10 podprzedziałów
# e) Romberga z dokładnością 10^-6
f(x) := e^(-x^2)
rectangle_integrate(f, a, b) :=
    return (b - a)*f((a + b)/2)
trapeze_integrate(f, a, b) :=
    return (b - a)/2*(f(a) + f(b))
simpson_integrate(f, a, b) :=
    return (b - a)/6*(f(a) + 4*f((a + b)/2) + f(b))
rectangle_integrate(f, 0, 1) = 0.778801
trapeze_integrate(f, 0, 1) = 0.68394
simpson_integrate(f, 0, 1) = 0.74718
rowny_podzial(a, b, N) :=
    for i ∈ 0 .. N
        V[i] ← a + i*(b - a)/N
    return V
przedzialy := rowny_podzial(0, 1, 10) = [0; 0.1; 0.2; 0.3; 0.4; 0.5; 0.6; 0.7; 0.8; 0.9; 1]
complex_rectangle(f, przedzialy) := sum(rectangle_integrate(f, przedzialy[i - 1], przedzialy[i]), i = 1 .. length(przedzialy) - 1)
complex_rectangle(f, przedzialy) = 0.747131
complex_trapeze(f, przedzialy) := sum(trapeze_integrate(f, przedzialy[i - 1], przedzialy[i]), i = 1 .. length(przedzialy) - 1)
complex_trapeze(f, przedzialy) = 0.746211
complex_simpson(f, przedzialy) := sum(simpson_integrate(f, przedzialy[i - 1], przedzialy[i]), i = 1 .. length(przedzialy) - 1)
complex_simpson(f, przedzialy) = 0.746824
# =================================================================
Romberg
R_Z_Trapeze(f, a, b, n) := sum(trapeze_integrate(f, a + k*(b - a)/n, a + (k + 1)*(b - a)/n), k = 0 .. n - 1)
Romberg(f, a, b, ε) :=
    A[0, 0] ← trapeze_integrate(f, a, b)
    i ← 0
    while 1
        i ← i + 1
        A[i, 0] ← R_Z_Trapeze(f, a, b, 2^i)
        for j ∈ 1 .. i
            A[i, j] ← A[i, j - 1] + (A[i, j - 1] - A[i - 1, j - 1])/(4^j - 1)
        if |A[i - 1, i - 1] - A[i, i]| < ε
            {
                break
            }
    A
Romberg(f, 0, 1, 10^-6) = [
    0.68394, 0, 0, 0, 0;
    0.73137, 0.74718, 0, 0, 0;
    0.742984, 0.746855, 0.746834, 0, 0;
    0.745866, 0.746826, 0.746824, 0.746824, 0;
    0.746585, 0.746824, 0.746824, 0.746824, 0.746824
]
