# Układy równań liniowych
# Dany jest układ równań Ax = b. Rozwiąż układ przy użyciu:
# a) eliminacji Guassa
# b) metody rozkładu LU.
#
# ad a) Należy przekształcić układ równań i wyświetlić uzyskaną macierz trójkątną oraz przekształcony wektor wyrazów wolnych. Następnie należy rozwiązać układ metodą podstawień wstecznych.
#
# ad b) Należy rozłożyć macierz A na iloczyn macierzy LU, wyświetlić te macierze i sprawdzić czy faktycznie ich iloczyn = A. Następnie należy zapisać wyjściowy układ równań Ax=b w postaci dwóch układów równań (z macierzami trójkątnymi), a potem rozwiązać te układy odpowiednio metodą podstawień oraz podstawień wstecznych.
A := [1, 8, 2; -20, 12, 0; -3, 5, 17]
b := [44; 8; 99]
ORIGIN := 1
gauss(A, b) :=
    for k ∈ 1 .. cols(A) - 1
        for w ∈ k + 1 .. rows(A)
            p ← A[w, k]/A[k, k]
            for c ∈ k .. cols(A)
                A[w, c] ← A[w, c] - A[k, c]*p
            b[w] ← b[w] - b[k]*p
    [A; b]
A^-1*b = [2; 4; 5]
G := gauss(A, b)
rev(A, b) :=
    n ← rows(A)
    x[n] ← b[n]/A[n, n]
    for i ∈ n - 1 .. 1
        x[i] ← (b[i] - sum(A[i, j]*x[j], j = i .. n))/A[i, i]
    x
G[1] = [1, 8, 2; 0, 172, 40; 0, 0, 16.2558]
G[2] = [44; 888; 81.2791]
A = [1, 8, 2; -20, 12, 0; -3, 5, 17]
W := rev(G[1], G[2]) = [2; 4; 5]
createLU(A) :=
    n ← rows(A)
    for i ∈ 1 .. n
        I[i, i] ← 1
    L ← I
    U ← A
    for j ∈ 1 .. n - 1
        T ← I
        Tinv ← I
        for i ∈ j + 1 .. n
            T[i, j] ← -U[i, j]/U[j, j]
            Tinv[i, j] ← U[i, j]/U[j, j]
        U ← T*U
        L ← L*Tinv
    [U; L]
UL := createLU(A)
U := UL[1] = [1, 8, 2; 0, 172, 40; 0, 0, 16.2558]
L := UL[2] = [1, 0, 0; -20, 1, 0; -3, 0.168605, 1]
L*U = [1, 8, 2; -20, 12, 0; -3, 5, 17]
pods(L, b) :=
    Y[1] ← b[1]/L[1, 1]
    for i ∈ 2 .. rows(L)
        Y[i] ← b[i] - sum(L[i, j]*Y[j], j = 1 .. i - 1)/L[i, i]
    Y
rozw := rev(U, pods(L, b)) = [2; 4; 5]
